phi3 := 27.18 deg
phi4 := 107.46 deg
BC := 0.8
AB := 0.2
phi2 := 72 deg
xD := 1
yD := 0
omega2 := 3
DC := 0.6
xA := 0
yA := 0
cos(phi2) = 0.309017
xB := xA + AB*cos(phi2) = 0.0618034
yB := yA + AB*sin(phi2) = 0.190211
B := [xD - xB; yD - yB]
B = [0.938197; -0.190211]
f := [BC*cos(phi3) - DC*cos(phi4); BC*sin(phi3) - DC*sin(phi4)]
f = [0.891685; -0.206926]
j := [-BC*sin(phi3), DC*sin(phi4); BC*cos(phi3), -DC*cos(phi4)]
j = [-0.36543, 0.572356; 0.711661, 0.180024]
Bf := B - f
Bf = [0.046512; 0.0167147]
j[0, 0] = -0.36543
j[0, 1] = 0.572356
f[0] = 0.891685
dphi3 + dphi4 == Bf[0]
dphi3 + dphi4 == Bf[1]
deltaPhi := lsolve(j, Bf)
deltaPhi = [0.00252271; 0.0828747]
phi3_1 := phi3 + deltaPhi[0]
phi3_1 = 0.476903  # Result is in radians
phi4_1 := phi4 + deltaPhi[1]
phi4_1 = 1.95841
# Iteration 2 -------------------------------------------
f2 := [BC*cos(phi3_1) - DC*cos(phi4_1); BC*sin(phi3_1) - DC*sin(phi4_1)]
f2 = [0.937522; -0.188265]
j2 := [-BC*sin(phi3_1), DC*sin(phi4_1); BC*cos(phi3_1), -DC*cos(phi4_1)]
j2 = [-0.367224, 0.555489; 0.710737, 0.226786]
Bf2 := B - f2
Bf2 = [0.00067441; -0.00194617]
# If one iteration is not enough copy the code and change 2 with 3 respectively! You will have to make a new mathcad file or move all the code, from the velocity and so on, further down so that you make space for the 3rd iteration code, further down phi3_2 and phi4_2 were the my final phi values, thus you need to replace those as well !!!!!
dphi3_1 + dphi4_1 == Bf2[0]
dphi3_1 + dphi4_1 == Bf2[1]
deltaPhi2 := lsolve(j2, Bf2)
deltaPhi2 = [-0.00258117; -0.000492279]
phi3_2 := phi3_1 + deltaPhi2[0] = 0.474322
phi4_2 := phi4_1 + deltaPhi2[1] = 1.95791
jfinal := j2
# Velocities and accelerations of RRR dyad
# Velocities ----------------------------------------------------------------------------
vBx := -AB*omega2*sin(phi2)
vBx = -0.570634
vDx := 0
vBy := AB*omega2*cos(phi2)
vBy = 0.18541
vDy := 0
Cmatrix := [vDx - vBx; vDy - vBy] = [0.570634; -0.18541]
omega3 + omega4 == -Cmatrix[0]
omega3 + omega4 == (-Cmatrix)[1]
omegaMatrix := lsolve(jfinal, Cmatrix)
omegaMatrix = [-0.486114; 0.705903]
# Accelerations --------------------------------------------------------------------------
aDx := 0
omegaMatrixSq := omegaMatrix^2
omegaMatrixSq = [0.236306; 0.498298]
aDy := 0
epsilon2 := 0
aBx := -AB*(omega2^2*cos(phi2)) = -0.556231
aBy := AB*(-omega2^2*sin(phi2)) = -1.7119
D := [aDx - aBx; aDy - aBy] = [0.556231; 1.7119]
jprime := [-BC*cos(phi3_2), DC*cos(phi4_2); -BC*sin(phi3_2), DC*sin(phi4_2)]
jfinal = [-0.367224, 0.555489; 0.710737, 0.226786]
helperMatrix := -jprime*omegaMatrixSq + D
helperMatrix = [0.837276; 1.52139]
epsilon3 + epsilon4 == helperMatrix[0]
epsilon3 + epsilon4 == helperMatrix[1]
E := lsolve(jfinal, helperMatrix)
epsilon3 := E[0]
E = [1.37053; 2.41331]
epsilon4 := E[1]
# Kinematic analysis of Dyad - RRR type
omega3 := omegaMatrix[0]
omega4 := omegaMatrix[1]
xCleft := xB + BC*cos(phi3_2) = 0.773485
xCright := xD + DC*cos(phi4_2) = 0.773488
yCleft := yB + BC*sin(phi3_2) = 0.5556
yCright := yD + DC*sin(phi4_2) = 0.555601
vCxleft := vBx - BC*omega3*sin(phi3_2) = -0.393014
vCxright := vDx - DC*omega4*sin(phi4_2) = -0.3922
vCyleft := vBy + BC*omega3*cos(phi3_2) = -0.160548
vCyright := vDy + DC*omega4*cos(phi4_2) = -0.159895
aCxleft := aBx - BC*(epsilon3*sin(phi3_2) + omega3^2*cos(phi3_2)) = -1.22518
aCyleft := aBy + BC*(epsilon3*cos(phi3_2) - omega3^2*sin(phi3_2)) = -0.822863
aCxright := aDx - DC*(epsilon4*sin(phi4_2) + omega4^2*cos(phi4_2)) = -1.22797
aCyright := aDy + DC*(epsilon4*cos(phi4_2) - omega4^2*sin(phi4_2)) = -0.823499
# Since speeds and acc are simillar
aPsi := -60 deg
vCx := vCxleft
vCy := vCyleft
aCx := aCxleft
aCy := aCyleft
CT := 0.5
vTx := vCx - CT*omega3*sin(phi3_2 + aPsi) = -0.524763
vTy := vCy - CT*omega3*cos(phi3_2 + aPsi) = 0.0437036
aTx := aCx - CT*(epsilon3*sin(phi3_2 + aPsi) + omega3^2*cos(phi3_2 + aPsi)) = -0.953023
aTy := aCy - CT*(epsilon3*cos(phi3_2 + aPsi) - omega3^2*sin(phi3_2 + aPsi)) = -1.46277
# For other points of RRR dyad M(CM,beta) on element 3 outside dir. BC we have:
gamma := 110.12 deg = 1.92196
beta := 29.47 deg = 0.514349
BM := BC
DN := DC
xM := xB + BM*cos(phi3_2 + beta) = 0.501644
yM := yB + BM*sin(phi3_2 + beta) = 0.858448
vMx := vBx - BM*omega3*sin(phi3_2 + beta) = -0.245795
vMy := vBy + BM*omega3*cos(phi3_2 + beta) = -0.0284024
aMx := aBx - BM*(epsilon3*sin(phi3_2 + beta) + omega3^2*cos(phi3_2 + beta)) = -1.57601
aMy := aBy + BM*(epsilon3*cos(phi3_2 + beta) - omega3^2*sin(phi3_2 + beta)) = -1.267
# For other points of RRR dyad T(CT,aPsi) dir BC and N(DN,gamma) dir DC
xN := xD + DN*cos(phi4_2 - gamma) = 1.59961
yN := yD + DC*sin(phi4_2 - gamma) = 0.0215693
aNx := aDx - DN*(epsilon4*sin(phi4_2 - gamma) + omega4^2*cos(phi4_2 - gamma)) = -0.350839
aNy := aDy + DN*(epsilon4*cos(phi4_2 - gamma) + omega4^2*sin(phi4_2 - gamma)) = 1.4578
vNx := vDx - DN*omega4*sin(phi4_2 - gamma) = -0.0152259
vNy := vDy + DN*omega4*cos(phi4_2 - gamma) = 0.423268
# Basic Mechanics
4 cm*5 = 0.2 m
20 cm*5 = 1 m
Fgiven := 100
11 cm*5 = 0.55 m
barDensity := 10
# F=ma
MFA := -Fgiven*0.28 = -28
0.338*100/5 = 6.76
MFB := -Fgiven*(0.28 - 0.19) = -9
MFC := -Fgiven*(0.55 - 0.2) = -35
MFCleft := -Fgiven*(0.33 - 0.10) = -23
MFCright := -Fgiven*(0.57 - 0.36) = -21
weightBCT := (0.8 + 0.5)*barDensity = 13
weightDC := DC*barDensity = 6
weightCT := CT*barDensity = 5
weightBC := 0.8*barDensity = 8
G31n := weightBC*g = 78.4532 m/s^2
G32n := weightCT*g = 49.0332 m/s^2
G31 := 78.453
G32 := 49.033
GBCTn := G31 + G32 = 127.486
GBCT := 127.486
C3B := G31*0.55/GBCT = 0.338462
C3A := G32*0.55/GBCT = 0.211538
C3B + C3A = 0.55
14.4 cm = 0.144 m
# Kinetostatic analysis of Dyad -RRR type
724.03 mm = 0.72403 m
BC3 := 0.724
DC4 := DC/2 = 0.3
betaC := 17 deg = 0.296706
gammaC := gamma = 1.92196
xC3 := xB + BC3*cos(phi3_2 + betaC) = 0.581052
xB = 0.0618034
yC3 := yB + BC3*sin(phi3_2 + betaC) = 0.694747
15.3 cm*5 = 0.765 m
xC4 := xD + DC4*cos(phi4_2 - gammaC) = 1.29981
yC4 := yD + DC4*sin(phi4_2 - gammaC) = 0.0107847
vC3X := vBx - BC3*omega3*sin(phi3_2 + betaC) = -0.325372
vC3Y := vBy - BC3*omega3*cos(phi3_2 + betaC) = 0.437824
aC3X := aBx - BC3*(epsilon3*sin(phi3_2 + betaC) + omega3^2 + cos(phi3_2 + betaC)) = -1.93805
aC3Y := aBy + BC3*(epsilon3*cos(phi3_2 + betaC) + omega3^2 - sin(phi3_2 + betaC)) = -1.33371
aC4X := aDx - DC4*(epsilon4*sin(phi4_2 - gammaC) + omega4^2*cos(phi4_2 - gammaC)) = -0.17542
aC4Y := aDy + DC4*(epsilon4*cos(phi4_2 - gammaC) - omega4^2*sin(phi4_2 - gammaC)) = 0.718151
AC2 := AB/2 = 0.1
.
xC2 := xA + AC2*cos(phi2) = 0.0309017
m3 := weightBCT = 13
yC2 := yA + AC2*sin(phi2) = 0.0951057
m4 := DC4*barDensity = 3
vC2X := -AC2*omega2*sin(phi2) = -0.285317
m2 := AC2*barDensity = 1
vC2Y := AC2*omega2*cos(phi2) = 0.0927051
aC2X := -AC2*omega2^2*cos(phi2) = -0.278115
aC2Y := -AC2*omega2^2*sin(phi2) = -0.855951
# forces of inertia
Fi3 := m3*aC3X*m/s^2 = -25.1946 m/s^2
Fi4 := m4*aC4X*(m/s^2) = -0.526259 m/s^2
Fi2 := m2*aC2X*m/s^2 = -0.278115 m/s^2
# all gravitational forces
G3 := GBCT = 127.486
G2 := m2*g = 9.80665 m/s^2
g = 9.80665 m/s^2
G4 := m4*g = 29.42 m/s^2
gn := 9.807
Mi3 := Fi3*BC3 = -18.2409 m/s^2
11*5/100 = 0.55
yC := 0.55
m3*gn + aC3Y = 126.157
Mi4 := Fi4*DC4 = -0.157878 m/s^2
m4*aC4X = -0.526259
xC := 0.77
F := 100
m4*(gn + aC4Y) = 31.5755
R23Y := 1
R23X := 1
R43X := 1
R14X := 1
F - m3*aC3X = 125.195
R14Y := 1
R34Y := 1
R34X := 1
R43Y := 1
Given
R34X + R43X == 0
R34Y + R43Y == 0
R23X + R43X == -125.195
R23Y + R43Y == -126.157
R14X + R34X == -0.526
R14Y + R34Y == 31.575
R23Y*(xB - xC3) - R23X*(yB - yC3) + R43Y*(xC - xC3) - R43X*(yC - yC3) == 18.241
R14Y*(xD - xC4) - R14X*(yD - yC4) + R34Y*(xC - xC4) - R34X*(yC - yC4) == 0.158
sol := Find(R34X, R34Y, R43X, R43Y, R14X, R14Y, R23Y, R23X)
sol = [-6.69777; -25.8534; 6.69777; 25.8534; 6.17177; 57.4284; -152.01; -131.893]
R34X := sol[0] = -6.69777
R34Y := sol[1] = -25.8534
R43X := sol[2] = 6.69777
R43Y := sol[3] = 25.8534
R14X := sol[4] = 6.17177
R14Y := sol[5] = 57.4284
R23X := sol[7] = -131.893
R23Y := sol[6] = -152.01
I3 := 1
I4 := 1
Given
R34X + R43X == 0
R34Y + R43Y == 0
R34X == -R43X
yC3 = 0.694747
R34Y == -R43Y
R14X - R43X - m4*aC4X == 0
epsilon3 = 1.37053
R14X - R43Y - m4*(gn + aC4Y) == 0
epsilon4 = 2.41331
R23X + R43X - m3*aC3X + F == 0
R23Y + R43Y - m3*(gn + aC3Y) == 0
R23Y*(xB - xC3) - R23X*(yB - yC3) + R43Y*(xC - xC3) - R43X*(yC - yC3) == I3*1.371
R14Y*(xD - xC4) - R14X*(yD - yC4) - R43Y*(xC - xC4) + R43X*(yC - yC4) == I4*2.413
sol2 := Find(I3, I4, R34X, R34Y, R43X, R43Y, R14X, R14Y, R23X)
sol2 = [-29.593; 117.496; -294.265; -262.163; 294.265; 262.163; 293.739; 57.4284; -419.46]
I3 := sol2[0] = -29.593
I4 := sol2[1] = 117.496
Fi2 = -0.278115 m/s^2
Mi2A := -Fi2*(yB - yA) = 0.0529007 m/s^2
R32X := 1
R32Y := 1
R12X := 1
R12Y := 1
Given
R32X + R23X == 0
R32Y + R23Y == 0
R32X == -R23X
R32Y == -R23Y
R12X + R32X - m2*aC2X == 0
R12Y + R32Y - m2*(gn + aC2Y) == 0
R12X == R23X + m2*aC2X
R12Y == R23Y + m2*(gn + aC2Y)
sol3 := Find(R32X, R32Y, R12X, R12Y) = [131.893; 152.01; -132.171; -143.059]
R32X := sol3[0] = 131.893
R32Y := sol3[1] = 152.01
R12X := sol3[2] = -132.171
R12Y := sol3[3] = -143.059
Mm := 1
I2A := 1
I2 := 1
AC2 = 0.1
Given
Mm == R32X*(yB - yA) - R32Y*(xB - xA) - m2*aC2X*(yC2 - yA) + m2*(aC2Y + gn)*(xC2 - xA) + I2A*epsilon2
I2A == I2 + m2*AC2^2
sol4 := Find(Mm, I2A, I2) = [15.9958; 1.01; 1]
Mm := sol4[0] = 15.9958
I2A := sol4[1] = 1.01
I2 := sol4[2] = 1
